// COMSOL Multiphysics 5.2.0.220 model "Dimer0_solutions.mph"
// Scatterer on Substrate
// modeldescr_woptics/scatterer_on_substrate
// A plane electromagnetic wave is incident on a gold nanoparticle on a dielectric substrate. The absorption and scattering cross sections of the particle are computed for a few different polar and azimuthal angles of incidence.
// Outline of the model tree

Parameters
  w = 750[nm]  // Width of physical geometry
  t_pml = 150[nm]  // PML thickness
  h_air = 400[nm]  // Air domain height
  h_subs = 250[nm]  // Substrate domain height
  na = 1  // Refractive index, air
  nb = 1.5  // Refractive index, substrate
  wl = 800[nm]  // Wavelength
  phi = 0  // Azimuthal angle of incidence in both media
  theta = 0  // Polar angle of incidence in air
  thetab = asin(na/nb*sin(theta))  // Polar angle in substrate
  I0 = 1[MW/m^2]  // Intensity of incident field
  P = I0*w^2*cos(theta)  // Port power

Variables
  var1 "Variables 1"
    ka = ewfd.k0*na  // Wave number in air
    kx = ka*cos(phi)*sin(theta)
    ky = ka*sin(phi)*sin(theta)
    kaz = -ka*cos(theta)
    kb = ewfd.k0*nb  // Wave number in substrate
    kbz = -kb*cos(thetab)
  var2 "Variables 2" on selection com1
    ewfd.Ex = 0
    ewfd.Ey = 0
    ewfd.Ez = 0
  var3 "Variables 3" on boundaries 62, 68
    E0x = -sin(phi)*exp(-i*(kx*x+ky*y))
    E0y = cos(phi)*exp(-i*(kx*x+ky*y))
  var4 "Variables 4"
    nrelPoav = nx*ewfd2.relPoavx+ny*ewfd2.relPoavy+nz*ewfd2.relPoavz  // Relative normal Poynting flux
    sigma_sc = intop_surf(nrelPoav)/I0  // Scattering cross section
    sigma_abs = intop_vol(ewfd2.Qh)/I0  // Absorption cross section
    sigma_ext = sigma_sc+sigma_abs  // Extinction cross section

Selections
  sel1: Explicit "Physical Domains" on domains 18, 19, 25, 26
  com1: Complement "PML Domains" | input = {sel1}
  sel2: Explicit "Nanoparticle" on domains 25
  sel3: Explicit "Nanoparticle Surface" on boundaries adjacent to domains 25

Couplings
  intop1: Integration on selection sel2 | opname = intop_vol
  intop2: Integration on selection sel3 | opname = intop_surf

Coordinate systems
  pml1: PML "Perfectly Matched Layer 1" on selection com1 | wavelengthSource = ewfd2; PMLfactor = 0.5

Geometry
  geom1 "Geometry 1" (3D, length unit m)
    blk1: Block
      pos = {0, 0, (h_air+t_pml)/2}
      base = center
      size = {w+2*t_pml, w+2*t_pml, h_air+t_pml}
      layername = Layer 1
      layer = t_pml
      layerleft = on
      layerright = on
      layerfront = on
      layerback = on
      layerbottom = off
      layertop = on
    blk2: Block
      pos = {0, 0, -(h_subs+t_pml)/2}
      base = center
      size = {w+2*t_pml, w+2*t_pml, h_subs+t_pml}
      layername = Layer 1
      layer = t_pml
      layerleft = on
      layerright = on
      layerfront = on
      layerback = on
      layerbottom = on
      layertop = off
    cyl1: Cylinder | pos = {-125*10^-9, 0, 0}; r = 105*10^-9; h = 40*10^-9
    cyl2: Cylinder | pos = {125*10^-9, 0, 0}; r = 105*10^-9; h = 40*10^-9
    sca1: Scale | input = cyl1, cyl2; type = anisotropic; anisotropic = {1, 1/3, 1}
    fin: Finalize "Form Union"

Materials
  mat1: Common "Air" on all domains
    RefractiveIndex
      n = na
      ki = 0
  mat2: Common "Substrate" on domains 1, 2, 5, 6, 9, 10, 13, 14, 17, 18, 21, 22, 27, 28, 31, 32, 35, 36
    RefractiveIndex
      n = nb
      ki = 0
  mat3: Common "Au (Rakic)" on domains 25, 26
    RefractiveIndex
      n = n_interp(1[1/m]*c_const/freq)
      ki = k_interp(1[1/m]*c_const/freq)
      n_interp: Interpolation
        source = table
        table = 
          {2.066e-07, 1.25223320824}
          {2.1089508319E-7, 1.28860501667}
          {2.15279458439E-7, 1.32053986347}
          {2.19754982075E-7, 1.34888336249}
          {2.24323549012E-7, 1.3746284289}
          {2.28987093564E-7, 1.39882611415}
          {2.33747590255E-7, 1.42248550103}
          {2.38607054657E-7, 1.44647562039}
          {2.43567544248E-7, 1.47144312879}
          {2.48631159276e-07, 1.49775668894}
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        interp = piecewisecubic
        extrap = const
      k_interp: Interpolation
        source = table
        table = 
          {2.066e-07, 1.98591656445}
          {2.1089508319E-7, 1.97534779229}
          {2.15279458439E-7, 1.96597777856}
          {2.19754982075E-7, 1.95853718525}
          {2.24323549012E-7, 1.95347479861}
          {2.28987093564E-7, 1.95092054945}
          {2.33747590255E-7, 1.95067979422}
          {2.38607054657E-7, 1.9522622682}
          {2.43567544248E-7, 1.95494272809}
          {2.48631159276e-07, 1.95784420876}
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        interp = piecewisecubic
        extrap = const

Physics
  ewfd: ElectromagneticWavesFrequencyDomain on selection sel1
    dependent variable E = {Ex, Ey, Ez}
    wee1: WaveEquationElectric (default)
    pec1: PerfectElectricConductor (default)
    init1: init "Initial Values 1" (default)
    wee2: WaveEquationElectric on domains 25, 26 | n_mat = userdef; n = na; ki_mat = userdef; ki = 0
    port1: Port on boundaries 68 | PortExcitation = on; Pin = P; beta = abs(kaz); E0 = {E0x, E0y, 0}
    port2: Port on boundaries 62 | beta = abs(kbz); E0 = {E0x, E0y, 0}
    pc1: PeriodicCondition on boundaries 60, 63, 115, 118 | PeriodicType = Floquet; kFloquet = {kx, ky, 0}
    pc2: PeriodicCondition on boundaries 61, 64, 74, 77 | PeriodicType = Floquet; kFloquet = {kx, ky, 0}
  ewfd2: ElectromagneticWavesFrequencyDomain on all domains
    dependent variable E2 = {E2x, E2y, E2z}
    BackgroundField.SolveFor = scatteredField
    BackgroundField.Eb = {ewfd.Ex, ewfd.Ey, ewfd.Ez}
    wee1: WaveEquationElectric (default) | minput_frequency_src = root.freq
    pec1: PerfectElectricConductor (default)
    init1: init "Initial Values 1" (default)

Mesh
  mesh1 "Mesh 1"
    size: MeshSizeDefault | hauto = 5
    map1: Map "Mapped 1" on boundaries 13, 26, 39, 56, 69, 82, 111, 124, 137
      dis1: Distribution on edges 42, 92, 139, 154 | numelem = 5
      dis2: Distribution on edges 78, 79 | numelem = 10
    swe1: Sweep "Swept 1" on selection com1
      dis1: Distribution on domains 1-17, 20-24, 27-38 | numelem = 5
    conv1: Convert on boundaries 60-64, 68, 74, 77, 115, 118
    ftet1: FreeTet "Free Tetrahedral 1" on remaining entities
      size1: Size on domains 25, 26 | hmax = 10[nm]; hauto = 5; custom = on

Studies
  std1 "Study 1"
    param: Parametric "Parametric Sweep" | pname = wl; plistarr = range(300,50,1500); punit = nm
    wave: Wavelength "Wavelength Domain" | punit = m; plist = wl; physselection = ewfd; solve for = {ewfd}
    wave2: Wavelength "Wavelength Domain 2" | punit = m; plist = wl; physselection = ewfd; solve for = {ewfd2}

Solver configurations
  sol1 "Solution 1" (study std1)
    v1: Variables "Dependent Variables 1"
    s1: Stationary "Stationary Solver 1"
      dDef: Direct
      fc1: FullyCoupled | linsolver = dDef
      pDef: Parametric
    v2: Variables "Dependent Variables 2" | initmethod = sol; notsolmethod = sol
    s2: Stationary "Stationary Solver 2"
      fc1: FullyCoupled | linsolver = i1
      i1: Iterative | linsolver = bicgstab
        mg1: Multigrid
      pDef: Parametric
  sol2 "Parametric Solutions 1" (study std1)
  sol3 "Parametric Solutions 2" (study std1)

Datasets
  dset1: Solution | solution = sol1
  dset2: Solution | solution = sol1
  dset3: Solution | solution = sol2
  dset4: Solution | solution = sol3
  cpl1: CutPlane | data = dset4; quickplane = xy; quickz = 40E-9; genpoints = {{0, 0, 0}, {1, 0, 0}, {0, 1, 0}}

Derived values
  int1: IntSurface "Surface Integration 1" on boundaries 65, 89, 95 | data = dset4; table = tbl3; expr = ewfd2.Poavz
  int2: IntSurface "Surface Integration 2" | data = cpl1; table = tbl4; expr = ewfd2.Poavz
  int3: IntSurface "Surface Integration 3" on boundaries 63, 64, 77, 118 | data = dset4; table = tbl5; expr = ewfd2.nPoav
  int4: IntSurface "Surface Integration 4" on boundaries 63, 64, 77, 118 | data = dset4; table = tbl5; expr = ewfd.nPoav

Tables
  tbl1: Table
    // Global Evaluation 1 (abs(ewfd.S11)^2)
    theta | phi | lambda0 (µm) | abs(ewfd.S11)^2 (1)
    0 | 0 | 0.5 | 0.0404486
    0.523599 | 0 | 0.5 | 0.0581813
    0.523599 | 0.785398 | 0.5 | 0.0578233
    0.785398 | 0.785398 | 0.5 | 0.0952774
  tbl2: Table
    // Global Evaluation 2 (sigma_abs)
    theta | phi | lambda0 (µm) | Absorption cross section (m^2) | Scattering cross section (m^2) | Extinction cross section (m^2)
    0 | 0 | 0.5 | 9.84726e-14 | 1.34964e-13 | 2.33437e-13
    0.523599 | 0 | 0.5 | 8.29187e-14 | 1.14678e-13 | 1.97597e-13
    0.523599 | 0.785398 | 0.5 | 8.33515e-14 | 1.16865e-13 | 2.00216e-13
    0.785398 | 0.785398 | 0.5 | 6.77659e-14 | 9.10537e-14 | 1.5882e-13
  tbl3: Table
    // Surface Integration 1 (ewfd.normE)
    wl (nm) | lambda0 (m) | Power flow, time average, z component (W)
    300 | 3e-07 | -5.68959e-07
    350 | 3.5e-07 | -5.38548e-07
    400 | 4e-07 | -5.31599e-07
    450 | 4.5e-07 | -5.26825e-07
    500 | 5e-07 | -5.16447e-07
    550 | 5.5e-07 | -5.009e-07
    600 | 6e-07 | -4.8675e-07
    650 | 6.5e-07 | -4.88873e-07
    700 | 7e-07 | -4.73645e-07
    750 | 7.5e-07 | -4.82159e-07
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  tbl5: Table
    // Surface Integration 3 (ewfd2.normE)
    wl (nm) | lambda0 (m) | Power outflow, time average (W)
    300 | 3e-07 | 1.61795e-09
    350 | 3.5e-07 | 6.00143e-09
    400 | 4e-07 | 7.27051e-09
    450 | 4.5e-07 | 4.44812e-09
    500 | 5e-07 | 3.19524e-09
    550 | 5.5e-07 | 4.44041e-09
    600 | 6e-07 | 5.48472e-09
    650 | 6.5e-07 | 3.66539e-09
    700 | 7e-07 | 3.42723e-09
    750 | 7.5e-07 | 3.47432e-09
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
Plots
  pg1: PlotGroup3D "3D Plot Group 1" | data = dset4
    slc1: Slice
      expr = ewfd2.normE
      quickplane = xy
      quickznumber = 1
      genpoints = {{0, 0, 0}, {1, 0, 0}, {0, 1, 0}}
      shift = -7e-08
    slc2: Slice | expr = ewfd2.normE; quickxnumber = 1; genpoints = {{0, 0, 0}, {1, 0, 0}, {0, 1, 0}}
  pg2: PlotGroup1D "1D Plot Group 2" | data = none
    tblp1: Table "Table Graph 1" | table = tbl4
  pg3: PlotGroup1D "1D Plot Group 3" | data = none
    tblp1: Table "Table Graph 1" | table = tbl3
  pg4: PlotGroup1D "1D Plot Group 4" | data = none
    tblp1: Table "Table Graph 1" | table = tbl5; xaxisdata = auto; plotcolumninput = manual

Exports
  tbl1: Table | table = tbl5; filename = Z:\Mark Daly\Mark - OIST\Comsol\GNR\Single Dimer 0 pol.txt